Simulations: Version=205
  Experiment pd
    Memo README
      This experiment uses a fertiliser factor to simulate different N-rates with two applications and multiple planting dates.
    Factors
      Permutation
        Factor FertiliserTreatment
          Specification=[FertiliserRule].Script.Treatment = Control,First,Second,Third
        Factor SowDate
          Specification=[SowingRule].Script.SowDate = 01-jul, 08-jul, 15-jul, 29-jul, 05-aug, 12-aug, 19-aug, 26-aug, 02-sep, 09-sep, 16-sep, 23-sep, 30-sep, 07-oct, 14-oct, 21-oct, 28-oct
    Simulation Base_one
      Clock: Start=2000-12-01; End=2020-12-31
      Summary SummaryFile
      Weather: FileName=C:/Users/lpmor/Downloads/wth_loc_1.met
      SoilArbitrator Soil Arbitrator
      Zone Field: Area=1; Slope=0; AspectAngle=0; Altitude=50
        Report: EventNames=[Maize].Harvesting
          VariableNames:
            [Clock].Today
            [FertiliserRule].Script.SeasonalFertiliser
            [Maize].Phenology.CurrentStageName
            [Maize].AboveGround.Wt
            [Maize].AboveGround.N
            [Maize].Grain.Wt
            [Maize].Grain.Size
            [Maize].Grain.NumberFunction
            [Maize].Grain.N
            [Maize].Total.Wt
            [Maize].Phenology.EmergenceDAS
            [Maize].Phenology.FloweringDAS
            [Maize].Phenology.MaturityDAS
            Sum of [Weather].Rain from [Maize].Sowing to [Maize].Harvesting as InCropRainfall
            Sum of [Weather].Radn from [Maize].Sowing to [Maize].Harvesting as InCropRadn
            Mean of [Weather].MaxT from [Maize].Sowing to [Maize].Harvesting as InCropMaxTemperature
            Mean of [Weather].MinT from [Maize].Sowing to [Maize].Harvesting as InCropMinTemperature
            Sum of [Soil].SoilWater.Eo from [Maize].Sowing to [Maize].Harvesting as InCropET
            Sum of [Soil].SoilWater.Es from [Maize].Sowing to [Maize].Harvesting as InCropES
            ([Maize].Grain.Wt * 10) / InCropET as WUE2
            sum([Soil].SoilWater.ESW) as TotalESW
            [Maize].Grain.Total.Wt*10 as Yield
            [Maize].SowingDate
        Fertiliser
        SurfaceOrganicMatter: InitialResidueName=wheat_stubble; InitialResidueType=wheat; InitialResidueMass=500; InitialStandingFraction=0; InitialCPR=0; InitialCNR=10
        Soil SoilType =  clay loam: SoilType=SoilType =  clay loam; Country=Rwanda; ApsoilNumber=0; Latitude=-1.475; Longitude=29.475
          DataSource=Original source is www.isric.org. See: https://www.isric.org/explore/soilgrids/faq-soilgrids  2024-12-03 23:43:01.767957
          Comments=resolution = 250m - taxonomic classification name = clay loam - drainage class = NA - elevation = NA - slope = NA - geomdesc = NA
          Physical
            Thickness  ParticleSizeSand  ParticleSizeSilt  ParticleSizeClay  Rocks     BD     AirDry    LL15      DUL       SAT       KS
            50         37.4              37                26.3              0.22461   0.9    0.22313   0.24313   0.446623  0.476206  9.2
            100        37                37                26                0.22461   0.9    0.218656  0.238656  0.440079  0.476206  8.8
            150        36.7              36                27                0.22461   0.9    0.197481  0.217481  0.391321  0.476206  4.2
            300        38.2              36                25                0.22461   0.9    0.173565  0.193565  0.355577  0.476206  3
            400        39.4              31.57             31.5              0.141182  1.07   0.1848    0.1849    0.357703  0.476206  1.1
            1000       40.6              30.62             31                0.127936  1.094  0.1668    0.1669    0.335676  0.476206  0.7
            Rocks source: Calculated
            SoilCrop MaizeSoil
              LL=[0.244, 0.249, 0.248, 0.203, 0.185, 0.167]
              KL=[0.06, 0.0491238, 0.0402192, 0.0329287, 0.0269597, 0.0220728]
              XF=[1, 1, 1, 1, 1, 1]
            SoilCrop SoybeanSoil: same as pd.Base_one.Field.SoilType =  clay loam.Physical.MaizeSoil
            SoilCrop WheatSoil: same as pd.Base_one.Field.SoilType =  clay loam.Physical.MaizeSoil
          WaterBalance SoilWater: SummerDate=1-Nov; SummerU=5; SummerCona=5; WinterDate=1-Apr; WinterU=5; WinterCona=5; DiffusConst=40; DiffusSlope=16; Salb=0.12; CN2Bare=73; CNRed=20; CNCov=0.8; PSIDul=-100; Thickness=[50, 100, 150, 300, 400, 1000]; SWCON=[0.4, 0.4, 0.4, 0.4, 0.4, 0.4]
          Organic: FOMCNRatio=40; CarbonUnits=Total
            Thickness  Carbon  SoilCNRatio  FBiom      FInert    FOM
            50         8.35    12           0.04       0.8       150
            100        8.01    12           0.0327492  0.80804   122.81
            150        5.52    12           0.0268128  0.816161  100.548
            300        3.97    12           0.0219525  0.824364  82.3217
            400        2.9     12           0.0179732  0.832649  67.3993
            1000       1.64    12           0.0147152  0.841017  55.1819
          Chemical: PHUnits=Water
            Thickness  PH    CEC
            50         5.4   28.3154
            100        5.5   27.4435
            150        5.5   22.0879
            300        5.4   18.1669
            400        5.66  17.5753
            1000       5.83  14.6872
            CEC source: Calculated
          Water: Thickness=[50, 100, 150, 300, 400, 1000]; InitialValues=[0.329, 0.3305, 0.3315, 0.307, 0.287, 0.274]; FilledFromTop=false
          Nutrient
          Solute NO3: Thickness=[50, 100, 150, 300, 400, 1000]; InitialValues=[0.5, 0.495025, 0.490099, 0.485223, 0.480395, 0.475615]; InitialValuesUnits=ppm; WaterTableConcentration=0; D0=0; DepthConstant=0; MaxDepthSoluteAccessible=0; RunoffEffectivenessAtMovingSolute=0; MaxEffectiveRunoff=0
          Solute NH4: Thickness=[50, 100, 150, 300, 400, 1000]; InitialValuesUnits=ppm; WaterTableConcentration=0; D0=0; DepthConstant=0; MaxDepthSoluteAccessible=0; RunoffEffectivenessAtMovingSolute=0; MaxEffectiveRunoff=0
            InitialValues=[0.05, 0.0495025, 0.0490099, 0.0485223, 0.0480395, 0.0475615]
          Solute Urea: Thickness=[150, 150, 300, 300, 300, 300, 300]; InitialValues=[0, 0, 0, 0, 0, 0, 0]; InitialValuesUnits=kg/ha; WaterTableConcentration=0; D0=0; DepthConstant=0; MaxDepthSoluteAccessible=0; RunoffEffectivenessAtMovingSolute=0; MaxEffectiveRunoff=0
          SoilTemperature Temperature
        Plant Maize
          Cultivar Early
            Command:
              [Phenology].Juvenile.Target.FixedValue = 135
              [Phenology].Photosensitive.Target.XYPairs.X = 0, 12.5, 24
              [Phenology].Photosensitive.Target.XYPairs.Y = 0, 0, 264.5
              [Structure].Phyllochron.Phyllochron.Phyllochron.XYPairs.X = 1, 2.4, 3.2
              [Structure].Phyllochron.Phyllochron.Phyllochron.XYPairs.Y = 22, 22, 34
              [Phenology].FlagLeafToFlowering.Target.FixedValue = 10
              [Phenology].FloweringToGrainFilling.Target.FixedValue = 140
              [Phenology].GrainFilling.Target.FixedValue = 280
              [Rachis].DMDemands.Structural.DMDemandFunction.MaximumOrganWt.FixedValue = 14
              [Grain].MaximumGrainsPerCob.FixedValue = 586
              [Grain].MaximumPotentialGrainSize.FixedValue = 0.341
          Cultivar Mid
            Command:
              [Phenology].Juvenile.Target.FixedValue = 150
              [Phenology].Photosensitive.Target.XYPairs.X = 0, 12.5, 24
              [Phenology].Photosensitive.Target.XYPairs.Y = 0, 0, 0
              [Structure].Phyllochron.Phyllochron.Phyllochron.XYPairs.X = 1, 2.8, 3.3
              [Structure].Phyllochron.Phyllochron.Phyllochron.XYPairs.Y = 26, 26, 38
              [Phenology].FlagLeafToFlowering.Target.FixedValue = 1
              [Phenology].FloweringToGrainFilling.Target.FixedValue = 170
              [Phenology].GrainFilling.Target.FixedValue = 410
              [Phenology].Maturing.Target.FixedValue = 1
              [Rachis].DMDemands.Structural.DMDemandFunction.MaximumOrganWt.FixedValue = 20
              [Grain].MaximumGrainsPerCob.FixedValue = 580
              [Grain].MaximumPotentialGrainSize.FixedValue = 0.381
          Cultivar Late
            Command:
              [Phenology].Juvenile.Target.FixedValue = 185
              [Phenology].Photosensitive.Target.XYPairs.X = 0, 12.5, 24
              [Phenology].Photosensitive.Target.XYPairs.Y = 0, 0, 0
              [Structure].Phyllochron.Phyllochron.Phyllochron.XYPairs.X = 1, 2.8, 3.3
              [Structure].Phyllochron.Phyllochron.Phyllochron.XYPairs.Y = 28, 28, 40
              [Phenology].FlagLeafToFlowering.Target.FixedValue = 1
              [Phenology].FloweringToGrainFilling.Target.FixedValue = 150
              [Phenology].GrainFilling.Target.FixedValue = 410
              [Phenology].Maturing.Target.FixedValue = 1
              [Phenology].MaturityToHarvestRipe.Target.FixedValue = 100
              [Rachis].DMDemands.Structural.DMDemandFunction.MaximumOrganWt.FixedValue = 20
              [Grain].MaximumPotentialGrainSize.FixedValue = 0.361
        MicroClimate: a_interception=0; b_interception=1; c_interception=0; d_interception=0; SoilHeatFluxFraction=0.4; MinimumHeightDiffForNewLayer=0; NightInterceptionFraction=0.5; ReferenceHeight=2
        Manager Harvesting
```csharp
using Models.PMF.Phen;
using APSIM.Shared.Utilities;
using System.Xml.Serialization;
using Models;
using Models.PMF;
using Models.Soils;
using System.Text;
using System.Collections.Generic;
using Models.Core;
using System;
using Models.Soils.Nutrients;

namespace Models
{
    [Serializable] 
    public class Script : Model
    {
        [Link(ByName = true)] private Plant Maize;
        [Link] private Zone zone;
        [Link(Type = LinkType.Path, Path = "[Maize].Phenology")]
        private Phenology phenology;
                    
        
        [EventSubscribe("StartOfSimulation")]
        private void OnSimulationCommencing(object sender, EventArgs e)
        {
        }
        
        [EventSubscribe("DoManagement")]
        private void OnDoManagement(object sender, EventArgs e)
        {
            if (phenology.CurrentPhase.Name == "ReadyForHarvesting")
            {
                Maize.Harvest();
                Maize.EndCrop();
            }
        }
        
        [EventSubscribe("DoManagementCalculations")]
        private void OnDoManagementCalculations(object sender, EventArgs e)
        {
            
        }
    }
}
```
        Manager FertiliserRule
          Crop = [Maize]
          FertiliserType = DAP
          Treatment = Low
          SeasonalFertiliser = 0
```csharp
using Models.Soils;
using System;
using System.Linq;
using Models.Core;
using Models.PMF;

namespace Models
{
    [Serializable]
    public class FertiliserRule : Model
    {
        [Link] Clock Clock;
        [Link] Fertiliser Fertiliser;
        
        [Description("Crop to be fertilised")]
        public IPlant Crop { get; set; }

        [Description("Type of fertiliser to apply? ")] 
        [Display(Type = DisplayType.FertiliserType)]
        public string FertiliserType { get; set; }
        
        [Description("Fertiliser Treatment Name (e.g., First, Third)")]
        public string Treatment { get; set; } = "First";
        
        // Internal variables to hold the split amounts
        private DateTime sowingDate;
        private double basalAmount = 0;
        private double topDressAmount = 0;
        [Description("Total seasonal fertilizer applied")]
        public double SeasonalFertiliser { get; set; }
        
        [EventSubscribe("StartOfSimulation")]
        private void OnSimulationCommencing(object sender, EventArgs e)
        {
            // Define your coupled applications here. 
            // You can easily add more treatments (e.g., "Medium", "Control")
            if (Treatment.ToLower() == "first")
            {
                basalAmount = 50;
                topDressAmount = 40;
            }
            else if (Treatment.ToLower() == "second")
            {
                basalAmount = 100;
                topDressAmount = 80;
            }
            else if (Treatment.ToLower() == "third")
            {
                basalAmount = 200;
                topDressAmount = 200;
            }
            else
            {
                basalAmount = 0;
                topDressAmount = 0;
            }
        }

        [EventSubscribe("Sowing")]
        private void OnSowing(object sender, EventArgs e)
        {
            // Record sowing date
            sowingDate = Clock.Today;
            Model crop = sender as Model;
            
            // Apply basal fertilizer at planting if amount > 0
            if (Crop != null && crop.Name.ToLower() == (Crop as IModel).Name.ToLower())
            {
                if (basalAmount > 0)
                {
                    Fertiliser.Apply(amount: basalAmount, type: FertiliserType);
                    SeasonalFertiliser = basalAmount; 
                }
            }
        }
        
        [EventSubscribe("DoManagement")]
        private void OnDoManagement(object sender, EventArgs e)
        {
            // Apply top-dress fertilizer at 40 Days After Planting if amount > 0
            if (Clock.Today == sowingDate.AddDays(42))
            {
                if (topDressAmount > 0)
                {
                    Fertiliser.Apply(amount: topDressAmount, type: FertiliserType);
                    SeasonalFertiliser = SeasonalFertiliser + topDressAmount;
                }
            }
        }
    }
}
```
        Manager Reset on date
          ResetDate = 01-jan
          OffsetDays = -30
          ResetWater = Yes
          ResetNutrients = Yes
          ResetSOM = Yes
```csharp
using Models.Soils.Nutrients;
using APSIM.Shared.Utilities;
using Models.Surface;
using Models.Utilities;
using Models.Soils.Nutrients;
using Models.Soils;
using Models.PMF;
using Models.Core;
using System;
using System.Linq;
using Models.Interfaces;

namespace Models
{
    [Serializable]
    public class Script : Model
    {
        [Link] private Clock Clock;
        [Link] private Plant Wheat;
        [Link] private ISoilWater SoilWater;
        [Link] private Nutrient nutrient;
        [Link] private SurfaceOrganicMatter SOM;
        [Link] private Summary Summary;

        [Description("Date to reset on:")]
        public string ResetDate {get;set;}
        
        [Description("Offset by Days (Negative is Days Before, Positive is Days After):")]
        public int OffsetDays {get;set;}

        [Description("Reset Water? (Yes or No)")]
        public string ResetWater {get;set;}

        [Description("Reset Soil Nutrients ? (Yes or No)")]
        public string ResetNutrients {get;set;}

        [Description("Reset Surface Organic Matter? (Yes or No)")]
        public string ResetSOM {get;set;}

        [EventSubscribe("DoManagement")]
        private void OnDoManagement(object sender, EventArgs e)
        {
            DateTime offsetDate = DateUtilities.GetDate(ResetDate, Clock.Today).AddDays(OffsetDays);
            if (offsetDate.Equals(Clock.Today))
            {
                if (ResetWater == "Yes")
                {
                    Summary.WriteMessage(this, "Reset Water", MessageType.Diagnostic);
                    SoilWater.Reset();
                }
                if (ResetNutrients == "Yes")
                {
                    Summary.WriteMessage(this, "Reset Nitrogen", MessageType.Diagnostic);
                    nutrient.Reset();
                }
                if (ResetSOM == "Yes")
                {
                    Summary.WriteMessage(this, "Reset Surface OM", MessageType.Diagnostic);
                    SOM.Reset();
                }
            }
        }
    }
}
```
        Manager SowingRule
          Crop = [Maize]
          SowDate = 24-Jul
          CultivarName = Early
          SowingDepth = 50
          RowSpacing = 750
          Population = 5.3
```csharp
using APSIM.Shared.Utilities;
using Models.Utilities;
using Models.Soils;
using Models.PMF;
using Models.Core;
using System;

namespace Models
{
    [Serializable]
    public class Script : Model
    {
        [Link] Clock Clock;
        [Link] Fertiliser Fertiliser;
        [Link] Summary Summary;
        [Link] Soil Soil;
        
        [Description("Crop")]
        public IPlant Crop { get; set; }

        [Description("Sowing date (d-mmm)")]
        public string SowDate { get; set; }

        [Display(Type = DisplayType.CultivarName)]
        [Description("Cultivar to be sown")]
        public string CultivarName { get; set; }

        [Description("Sowing depth (mm)")]
        public double SowingDepth { get; set; }

        [Description("Row spacing (mm)")]
        public double RowSpacing { get; set; }

        [Description("Plant population (/m2)")]
        public double Population { get; set; }

        [EventSubscribe("DoManagement")]
        private void OnDoManagement(object sender, EventArgs e)
        {
            if (DateUtilities.WithinDates(SowDate, Clock.Today, SowDate))
            {
                Crop.Sow(population: Population, cultivar: CultivarName, depth: SowingDepth, rowSpacing: RowSpacing);    
            }
        }
    }
}
```
  DataStore
