Simulations: Version=205
  DataStore
  Experiment pd
    Memo README
      This experiment uses a fertiliser factor to simulate an N-rate trial. The graph shows the effect of the fertiliser applications on total soil nitrate level in each treatment.
    Factors
      Permutation
        Factor SowDate
          Specification=[SowingRule].Script.SowDate =01-jul, 08-jul, 15-jul, 29-jul, 05-aug, 12-aug, 19-aug, 26-aug, 02-sep, 09-sep, 16-sep, 23-sep, 30-sep, 07-oct, 14-oct, 21-oct, 28-oct
        Factor
          Specification=[FertiliserRule].Script.ApplicationAmount = 0 to 200 step 50
    Simulation Base_one
      Clock: Start=2000-12-01; End=2020-12-31
      Summary SummaryFile
      Weather
        FileName=/home/jovyan/patricia_repos/agwise-fertilizer/useCases/Data/CropModel_Approach/Maize/useCase_Kenya_Example/transform/APSIM/AOI/Early/Kisumu/EXTE0026/wth_loc_26.met
      SoilArbitrator Soil Arbitrator
      Zone Field: Area=1; Slope=0; AspectAngle=0; Altitude=50
        Report: EventNames=[Maize].Harvesting
          VariableNames:
            [Clock].Today
            [Maize].Phenology.CurrentStageName
            [Maize].AboveGround.Wt
            [Maize].AboveGround.N
            [Maize].Grain.Wt
            [Maize].Grain.Size
            [Maize].Grain.NumberFunction
            [Maize].Grain.N
            [Maize].Total.Wt
            [Maize].Phenology.EmergenceDAS
            [Maize].Phenology.FloweringDAS
            [Maize].Phenology.MaturityDAS
            Sum of [Weather].Rain from [Maize].Sowing to [Maize].Harvesting as InCropRainfall
            Sum of [Weather].Radn from [Maize].Sowing to [Maize].Harvesting as InCropRadn
            Mean of [Weather].MaxT from [Maize].Sowing to [Maize].Harvesting as InCropMaxTemperature
            Mean of [Weather].MinT from [Maize].Sowing to [Maize].Harvesting as InCropMinTemperature
            Sum of [Soil].SoilWater.Eo from [Maize].Sowing to [Maize].Harvesting as InCropET
            Sum of [Soil].SoilWater.Es from [Maize].Sowing to [Maize].Harvesting as InCropES
            ([Maize].Grain.Wt * 10) / InCropET as WUE2
            sum([Soil].SoilWater.ESW) as TotalESW
            [Maize].Grain.Total.Wt*10 as Yield
            [Maize].SowingDate
            [Maize].Grain.Total.Wt*10 as Yield
            [Maize].SowingDate
            [Maize].Grain.Total.Wt*10 as Yield
            [Maize].SowingDate
            [Maize].Grain.Total.Wt*10 as Yield
            [Maize].SowingDate
            [Maize].Grain.Total.Wt*10 as Yield
            [Maize].SowingDate
        Fertiliser
        SurfaceOrganicMatter: InitialResidueName=wheat_stubble; InitialResidueType=wheat; InitialResidueMass=500; InitialStandingFraction=0; InitialCPR=0; InitialCNR=10
        Soil SoilType =  clay loam: SoilType=SoilType =  clay loam; Country=Rwanda; ApsoilNumber=0; Latitude=-1.475; Longitude=29.475
          DataSource=Original source is www.isric.org. See: https://www.isric.org/explore/soilgrids/faq-soilgrids  2024-12-03 23:43:01.767957
          Comments=resolution = 250m - taxonomic classification name = clay loam - drainage class = NA - elevation = NA - slope = NA - geomdesc = NA
          Physical
            Thickness  ParticleSizeSand  ParticleSizeSilt  ParticleSizeClay  Rocks     BD     AirDry      LL15        DUL       SAT       KS
            50         37.4              23                37                0.22461   1.2    0.231771    0.2439      0.387588  0.452118  0.9
            100        37                23                39                0.22461   1.2    0.229212    0.2489      0.377437  0.452118  0.4
            150        36.7              23                37                0.22461   1.3    0.21401366  0.23401366  0.360629  0.452118  0.4
            300        38.2              21                42                0.22461   1.3    0.2028      0.2029      0.38055   0.452118  0.2
            400        39.4              19.21             41.2              0.141182  1.302  0.1848      0.1849      0.373562  0.452118  0.1
            1000       40.6              19.26             40.8              0.127936  1.311  0.1668      0.1669      0.36953   0.452118  0.1
            Rocks source: Calculated
            SoilCrop MaizeSoil
              LL=[0.244, 0.249, 0.248, 0.203, 0.185, 0.167]
              KL=[0.06, 0.0491238, 0.0402192, 0.0329287, 0.0269597, 0.0220728]
              XF=[1, 1, 1, 1, 1, 1]
            SoilCrop SoybeanSoil: same as pd.Base_one.Field.SoilType =  clay loam.Physical.MaizeSoil
            SoilCrop WheatSoil: same as pd.Base_one.Field.SoilType =  clay loam.Physical.MaizeSoil
          WaterBalance SoilWater: SummerDate=1-Nov; SummerU=5; SummerCona=5; WinterDate=1-Apr; WinterU=5; WinterCona=5; DiffusConst=40; DiffusSlope=16; Salb=0.13; CN2Bare=73; CNRed=20; CNCov=0.8; PSIDul=-100; Thickness=[50, 100, 150, 300, 400, 1000]; SWCON=[0.4, 0.4, 0.4, 0.4, 0.4, 0.4]
          Organic: FOMCNRatio=40; CarbonUnits=Total
            Thickness  Carbon  SoilCNRatio  FBiom      FInert    FOM
            50         4.26    12           0.04       0.8       150
            100        2.52    12           0.0327492  0.80804   122.81
            150        1.75    12           0.0268128  0.816161  100.548
            300        1.13    12           0.0219525  0.824364  82.3217
            400        0.96    12           0.0179732  0.832649  67.3993
            1000       0.74    12           0.0147152  0.841017  55.1819
          Chemical: PHUnits=Water
            Thickness  PH    CEC
            50         5.7   28.3154
            100        5.7   27.4435
            150        5.7   22.0879
            300        5.7   18.1669
            400        5.87  17.5753
            1000       6.04  14.6872
            CEC source: Calculated
          Water: Thickness=[50, 100, 150, 300, 400, 1000]; InitialValues=[0.329, 0.3305, 0.3315, 0.307, 0.287, 0.274]; FilledFromTop=false
          Nutrient
          Solute NO3: Thickness=[50, 100, 150, 300, 400, 1000]; InitialValues=[0.5, 0.495025, 0.490099, 0.485223, 0.480395, 0.475615]; InitialValuesUnits=ppm; WaterTableConcentration=0; D0=0; DepthConstant=0; MaxDepthSoluteAccessible=0; RunoffEffectivenessAtMovingSolute=0; MaxEffectiveRunoff=0
          Solute NH4: Thickness=[50, 100, 150, 300, 400, 1000]; InitialValuesUnits=ppm; WaterTableConcentration=0; D0=0; DepthConstant=0; MaxDepthSoluteAccessible=0; RunoffEffectivenessAtMovingSolute=0; MaxEffectiveRunoff=0
            InitialValues=[0.05, 0.0495025, 0.0490099, 0.0485223, 0.0480395, 0.0475615]
          Solute Urea: Thickness=[150, 150, 300, 300, 300, 300, 300]; InitialValues=[0, 0, 0, 0, 0, 0, 0]; InitialValuesUnits=kg/ha; WaterTableConcentration=0; D0=0; DepthConstant=0; MaxDepthSoluteAccessible=0; RunoffEffectivenessAtMovingSolute=0; MaxEffectiveRunoff=0
          SoilTemperature Temperature
        Plant Maize
          Cultivar Early
            Command:
              [Phenology].Juvenile.Target.FixedValue = 135
              [Phenology].Photosensitive.Target.XYPairs.X = 0, 12.5, 24
              [Phenology].Photosensitive.Target.XYPairs.Y = 0, 0, 264.5
              [Structure].Phyllochron.Phyllochron.Phyllochron.XYPairs.X = 1, 2.4, 3.2
              [Structure].Phyllochron.Phyllochron.Phyllochron.XYPairs.Y = 22, 22, 34
              [Phenology].FlagLeafToFlowering.Target.FixedValue = 10
              [Phenology].FloweringToGrainFilling.Target.FixedValue = 140
              [Phenology].GrainFilling.Target.FixedValue = 280
              [Rachis].DMDemands.Structural.DMDemandFunction.MaximumOrganWt.FixedValue = 14
              [Grain].MaximumGrainsPerCob.FixedValue = 586
              [Grain].MaximumPotentialGrainSize.FixedValue = 0.341
          Cultivar Mid
            Command:
              [Phenology].Juvenile.Target.FixedValue = 150
              [Phenology].Photosensitive.Target.XYPairs.X = 0, 12.5, 24
              [Phenology].Photosensitive.Target.XYPairs.Y = 0, 0, 0
              [Structure].Phyllochron.Phyllochron.Phyllochron.XYPairs.X = 1, 2.8, 3.3
              [Structure].Phyllochron.Phyllochron.Phyllochron.XYPairs.Y = 26, 26, 38
              [Phenology].FlagLeafToFlowering.Target.FixedValue = 1
              [Phenology].FloweringToGrainFilling.Target.FixedValue = 170
              [Phenology].GrainFilling.Target.FixedValue = 410
              [Phenology].Maturing.Target.FixedValue = 1
              [Rachis].DMDemands.Structural.DMDemandFunction.MaximumOrganWt.FixedValue = 20
              [Grain].MaximumGrainsPerCob.FixedValue = 580
              [Grain].MaximumPotentialGrainSize.FixedValue = 0.381
          Cultivar Late
            Command:
              [Phenology].Juvenile.Target.FixedValue = 185
              [Phenology].Photosensitive.Target.XYPairs.X = 0, 12.5, 24
              [Phenology].Photosensitive.Target.XYPairs.Y = 0, 0, 0
              [Structure].Phyllochron.Phyllochron.Phyllochron.XYPairs.X = 1, 2.8, 3.3
              [Structure].Phyllochron.Phyllochron.Phyllochron.XYPairs.Y = 28, 28, 40
              [Phenology].FlagLeafToFlowering.Target.FixedValue = 1
              [Phenology].FloweringToGrainFilling.Target.FixedValue = 150
              [Phenology].GrainFilling.Target.FixedValue = 410
              [Phenology].Maturing.Target.FixedValue = 1
              [Phenology].MaturityToHarvestRipe.Target.FixedValue = 100
              [Rachis].DMDemands.Structural.DMDemandFunction.MaximumOrganWt.FixedValue = 20
              [Grain].MaximumPotentialGrainSize.FixedValue = 0.361
        MicroClimate: a_interception=0; b_interception=1; c_interception=0; d_interception=0; SoilHeatFluxFraction=0.4; MinimumHeightDiffForNewLayer=0; NightInterceptionFraction=0.5; ReferenceHeight=2
        Manager SowingRule
          Crop = [Maize]
          SowDate = 24-Jul
          CultivarName = Early
          SowingDepth = 50
          RowSpacing = 750
          Population = 5.3
```csharp
using APSIM.Shared.Utilities;
using Models.Utilities;
using Models.Soils;
using Models.PMF;
using Models.Core;
using System;

namespace Models
{
    [Serializable]
    public class Script : Model
    {
        [Link] Clock Clock;
        [Link] Fertiliser Fertiliser;
        [Link] Summary Summary;
        [Link] Soil Soil;
        
        [Description("Crop")]
        public IPlant Crop { get; set; }

        [Description("Sowing date (d-mmm)")]
        public string SowDate { get; set; }

        [Display(Type = DisplayType.CultivarName)]
        [Description("Cultivar to be sown")]
        public string CultivarName { get; set; }

        [Description("Sowing depth (mm)")]
        public double SowingDepth { get; set; }

        [Description("Row spacing (mm)")]
        public double RowSpacing { get; set; }

        [Description("Plant population (/m2)")]
        public double Population { get; set; }

        [EventSubscribe("DoManagement")]
        private void OnDoManagement(object sender, EventArgs e)
        {
            if (DateUtilities.WithinDates(SowDate, Clock.Today, SowDate))
            {
                Crop.Sow(population: Population, cultivar: CultivarName, depth: SowingDepth, rowSpacing: RowSpacing);    
            }
        }
    }
}
```
        Manager Harvesting
```csharp
using Models.PMF.Phen;
using APSIM.Shared.Utilities;
using System.Xml.Serialization;
using Models;
using Models.PMF;
using Models.Soils;
using System.Text;
using System.Collections.Generic;
using Models.Core;
using System;
using Models.Soils.Nutrients;

namespace Models
{
    [Serializable] 
    public class Script : Model
    {
        [Link(ByName = true)] private Plant Maize;
        [Link] private Zone zone;
        [Link(Type = LinkType.Path, Path = "[Maize].Phenology")]
        private Phenology phenology;
                    
        
        [EventSubscribe("StartOfSimulation")]
        private void OnSimulationCommencing(object sender, EventArgs e)
        {
        }
        
        [EventSubscribe("DoManagement")]
        private void OnDoManagement(object sender, EventArgs e)
        {
            if (phenology.CurrentPhase.Name == "ReadyForHarvesting")
            {
                Maize.Harvest();
                Maize.EndCrop();
            }
        }
        
        [EventSubscribe("DoManagementCalculations")]
        private void OnDoManagementCalculations(object sender, EventArgs e)
        {
            
        }
    }
}
```
        Manager Fertilise at sowing
          Crop = [Maize]
          FertiliserType = DAP
          Amount = 150
```csharp
using Models.Soils;
using System;
using System.Linq;
using Models.Core;
using Models.PMF;
namespace Models
{
    [Serializable]
    public class Script : Model
    {
        [Link] Clock Clock;
        [Link] Fertiliser Fertiliser;
        
        [Description("Crop to be fertilised")]
        public IPlant Crop { get; set; }

        [Description("Type of fertiliser to apply? ")] 
        [Display(Type = DisplayType.FertiliserType)]public string FertiliserType { get; set; }
    
        [Description("Amount of fertiliser to be applied (kg/ha)")]
        public double Amount { get; set; }
        
        [EventSubscribe("Sowing")]
        private void OnSowing(object sender, EventArgs e)
        {
            Model crop = sender as Model;
            if (Crop != null && crop.Name.ToLower() == (Crop as IModel).Name.ToLower())
                Fertiliser.Apply(amount: Amount, type: FertiliserType);
        }
    }
}
```
        Manager Fertilise topup
          FertiliserType = UreaGranular
          Threshold = 100
```csharp
using APSIM.Numerics;
using Models.Soils.Nutrients;
using System.Linq;
using System;
using Models.Core;
using Models.PMF;
using Models.Soils.Nutrients;
using APSIM.Shared.Utilities;
using Models.Soils;
namespace Models
{
    [Serializable]
    public class Script : Model
    {
        [Link] Clock Clock;
        [Link] Fertiliser Fertiliser;
        [Link(ByName=true)] Solute NO3;

        [Description("Type of fertiliser to apply? ")] 
        [Display(Type = DisplayType.FertiliserType)]public string FertiliserType { get; set; }
    
        [Description("Threshold amount of NO3 to topup to (kg/ha)")]
        public double Threshold { get; set;}
        
        [EventSubscribe("DoManagement")]
        private void OnDoManagement(object sender, EventArgs e)
        {
            double Amount = Threshold - MathUtilities.Sum(NO3.kgha);
            Fertiliser.Apply(amount: Amount, type: FertiliserType);
        }
    }
}
```
        Manager Reset on date
          ResetDate = 01-jan
          OffsetDays = -30
          ResetWater = Yes
          ResetNutrients = Yes
          ResetSOM = Yes
```csharp
using Models.Soils.Nutrients;
using APSIM.Shared.Utilities;
using Models.Surface;
using Models.Utilities;
using Models.Soils.Nutrients;
using Models.Soils;
using Models.PMF;
using Models.Core;
using System;
using System.Linq;
using Models.Interfaces;

namespace Models
{
    [Serializable]
    public class Script : Model
    {
        [Link] private Clock Clock;
        [Link] private Plant Wheat;
        [Link] private ISoilWater SoilWater;
        [Link] private Nutrient nutrient;
        [Link] private SurfaceOrganicMatter SOM;
        [Link] private Summary Summary;

        [Description("Date to reset on:")]
        public string ResetDate {get;set;}
        
        [Description("Offset by Days (Negative is Days Before, Positive is Days After):")]
        public int OffsetDays {get;set;}

        [Description("Reset Water? (Yes or No)")]
        public string ResetWater {get;set;}

        [Description("Reset Soil Nutrients ? (Yes or No)")]
        public string ResetNutrients {get;set;}

        [Description("Reset Surface Organic Matter? (Yes or No)")]
        public string ResetSOM {get;set;}

        [EventSubscribe("DoManagement")]
        private void OnDoManagement(object sender, EventArgs e)
        {
            DateTime offsetDate = DateUtilities.GetDate(ResetDate, Clock.Today).AddDays(OffsetDays);
            if (offsetDate.Equals(Clock.Today))
            {
                if (ResetWater == "Yes")
                {
                    Summary.WriteMessage(this, "Reset Water", MessageType.Diagnostic);
                    SoilWater.Reset();
                }
                if (ResetNutrients == "Yes")
                {
                    Summary.WriteMessage(this, "Reset Nitrogen", MessageType.Diagnostic);
                    nutrient.Reset();
                }
                if (ResetSOM == "Yes")
                {
                    Summary.WriteMessage(this, "Reset Surface OM", MessageType.Diagnostic);
                    SOM.Reset();
                }
            }
        }
    }
}
```
